*Heading
** A FSP is brought into Abaqus using Nastran input file (.bdf). The fluid mesh is generated by Gmsh.
** Job name: Job-4 Model name: 3Dbarge_abaqus_formulated
** Generated by: Abaqus/CAE 6.13-3
*Preprint, echo=NO, model=NO, history=NO, contact=NO
**
** PARTS
**
*Part, name=STRUCTURE
*Node
 *Node
    576,  -4.26719999,   1.82879996,       2.1336
    577,  -4.26719999,   2.43840003,       2.1336
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*Element, type=S4R
40081,  2882,  2363,  2345,  2864
40082,  3622,  2882,  2864,  3389
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*Elset, elset=PSHELL_1
 40081, 40082, 40083, 40084, 40085, 40086
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*Elset, elset=PSHELL_2
 47137, 47138, 47139, 47140, 47141, 47142
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*Elset, elset=PSHELL_3
 54949, 54950, 54951, 54952, 54953, 54954
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*Elset, elset=PSHELL_4
 57469, 57470, 57471, 57472, 57473, 57474
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*Elset, elset=PSHELL_5, generate
 58981,  65028,      1
*Elset, elset=PSHELL_6
 65029, 65030, 65031, 65032, 65033, 65034
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** Section: Section-1-PSHELL_1
*Shell Section, elset=PSHELL_1, material=MAT_MID_1, controls=EC-1
0.0254, 5
** Section: Section-2-PSHELL_2
*Shell Section, elset=PSHELL_2, material=MAT_MID_2, controls=EC-1
0.0127, 5
** Section: Section-3-PSHELL_3
*Shell Section, elset=PSHELL_3, material=MAT_MID_3, controls=EC-1
0.003175, 5
** Section: Section-4-PSHELL_4
*Shell Section, elset=PSHELL_4, material=MAT_MID_1, controls=EC-1
0.022225, 5
** Section: Section-5-PSHELL_5
*Shell Section, elset=PSHELL_5, material=MAT_MID_5, controls=EC-1
0.0127, 5
** Section: Section-6-PSHELL_6
*Shell Section, elset=PSHELL_6, material=MAT_MID_4, controls=EC-1
0.0254, 5
*End Part
**
** ASSEMBLY
**
*Assembly, name=Assembly
*Instance, name=STRUCTURE-1, part=STRUCTURE
**    5.334,           0.,       3.6576
*End Instance
**
*Elset, elset=ALL_MASSIVE_ELEMENTS, instance=Structure-1, generate
 40081,  79068,      1
*Elset, elset=ALL_SHELL_ISO, instance=Structure-1, generate
 40081,  79068,      1
*Elset, elset=FSI_structure_back, internal, instance=STRUCTURE-1
44113, 44114, 44115, 44116, 44117, 44118
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*Elset, elset=FSI_structure_left, internal, instance=STRUCTURE-1
67621, 67622, 67623, 67624, 67625, 67626
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*Elset, elset=FSI_structure_bottom, internal, instance=STRUCTURE-1
40081, 40082, 40083, 40084, 40085, 40086
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*Elset, elset=FSI_structure_front, internal, instance=STRUCTURE-1
44869, 44870, 44871, 44872, 44873, 44874
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*Elset, elset=FSI_structure_right, internal, instance=STRUCTURE-1
67999, 68000, 68001, 68002, 68003, 68004
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*Surface, type=ELEMENT, name=FSI_Structure_back
FSI_structure_back, SNEG
*Surface, type=ELEMENT, name=FSI_Structure_left
FSI_structure_left, SNEG
*Surface, type=ELEMENT, name=FSI_Structure_bottom
FSI_structure_bottom, SNEG
*Surface, type=ELEMENT, name=FSI_Structure_front
FSI_structure_front, SNEG
*Surface, type=ELEMENT, name=FSI_Structure_right
FSI_structure_right, SNEG
*Nset, nset=output_node, instance=STRUCTURE-1
10789 ,17305
*End Assembly
**
** ELEMENT CONTROLS
**
*Section Controls, name=EC-1, hourglass=STIFFNESS
1., 1., 1.
**
** MATERIALS
**
**  MATERIALS
*Material, name=MAT_MID_1
*Density
7850.,
*Elastic
 2.04e+11, 0.3
**  material data from MAT1 with MID = 2
**
*Material, name=MAT_MID_2
*Density
 7861.1,
*Elastic
 2.05e+11, 0.28
**  material data from MAT1 with MID = 3
**
*Material, name=MAT_MID_3
*Density
7850.,
*Elastic
 2e+11, 0.303
**  material data from MAT1 with MID = 4
**
*Material, name=MAT_MID_4
*Density
 7540.8,
*Elastic
 2.04e+11, 0.3
**  material data from MAT1 with MID = 5
**
*Material, name=MAT_MID_5
*Density
4393.,
*Elastic
 2.04e+11, 0.3
**
**
** STEP: Step-1
**
**Step, name=Step-1, nlgeom=YES, INC=20000
*Step, name=Step-1, nlgeom=YES
shock
**Dynamic, Explicit, direct user control
**1.3826E-6, 0.03
*Dynamic, Explicit
, 0.03
*Bulk Viscosity
**0.5, 0.
**0.5, 0.
0.0, 0.
*DLOAD
ASSEMBLY. ALL_MASSIVE_ELEMENTS, GRAV, 9.81, 0., -1., 0.
** OUTPUT REQUESTS
**
** HISTORY OUTPUT: H-Output-1
**
*Output, history, TIME INTERVAL=1E-5
*Node Output, nset=ASSEMBLY. output_node
U1, U2, U3, V1, V2, V3, A1, A2, A3
*End Step
